**
** INPUT FILE FOR ABAQUS FOR IMPLEMENTATION OF STRAIN-GRADIENT ELASTICITY
** IMPLEMENTATION OF THE USER DEFINED-ELEMENTS QU34L4 VIA SUBROUTINE UEL
**
*HEADING
STRAIN-GRADIENT ELASTICITY IN PLANE STRAIN WITH USER ELEMENT QU34L4
**
**PREPRINT, MODEL=NO
**
******************************
**
** DEFINE NODES
**
*PART, NAME=abapart
*End Part
*ASSEMBLY, NAME=assembly
*INSTANCE, NAME=abainstance, PART=abapart
**
*NODE,NSET=ALL
1,-4.93834352,-3.74495029
2,-4.94190931,-3.81753445
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**
**NGEN,NSET=ALL
**1,5,1
**6,10,1
**11,15,1
**16,20,1
**21,25,1
**
******************************
** DEFINE USER ELEMENT: DOF AT NODE 1-4: 1,2,21-24
** DOF AT NODE 5-8: 1,2
** DOF AT NODE 9: 1,2,25-28
**
** DECLARATION DOF: DOF SYMBOL MEANING
** 1 U1 DISPLACEMENT - X
** 2 U2 DISPLACEMENT - Y
** 21 PSI11 RELAXED STRAIN - XX
** 22 PSI21 RELAXED STRAIN - YX
** 23 PSI12 RELAXED STRAIN - XY
** 24 PSI22 RELAXED STRAIN - YY
** 25 RHO11 LAGRANGE MULTIPLIER - XX
** 26 RHO21 LAGRANGE MULTIPLIER - YX
** 27 RHO12 LAGRANGE MULTIPLIER - XY
** 28 RHO22 LAGRANGE MULTIPLIER - YY
**
*USER ELEMENT,NODES=9,TYPE=U1001,PROPERTIES=4,COORDINATES=2,VARIABLES=298
1,2
1,19,20,21,22
5,
6,
7,
8,
9,
9,25,26,27,28
**
******************************
**
** DEFINE USER ELEMENT PROPERTIES (E,NU,L,DENS)
**
** SYMBOL MEANING
**
** E YOUNG'S MODULUS
** NU POISSON'S RATIO
** L MICROSTRUCTURAL LENGTH
** DENS DENSITY
**
*UEL PROPERTY,ELSET=ELEM
210e3,0.3,0.0001,7850e-6.
**
******************************
**
** GENERATE ELEMENTS
**
*ELEMENT,TYPE=U1001,ELSET=ELEM
1,1,2,3,4,7,8,9,10,2264
2,1,5,6,2,11,12,13,7,2265
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**
*END INSTANCE
** DEFINE NODE SETS
**
*Nset, nset=Bootom, INSTANCE=abainstance
   23,   24,   86,   87,   88,   89
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**
*Elset, elset=HoleElement, INSTANCE=abainstance, generate
  19,  515,   16
**
*Nset, nset=Holeperi, INSTANCE=abainstance
   22,   23,   55,   56,   57,   58
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**
*Nset, nset=Left, INSTANCE=abainstance
    5,    6,   12,   22,   40,   41
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**
*Nset, nset=Right, INSTANCE=abainstance
 1767, 1768, 1772, 1779, 1783, 1789
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**
*Elset, elset=RightElement, INSTANCE=abainstance, generate
 561,  631,   10
**
*Nset, nset=Set-8, INSTANCE=abainstance
   23,   24,   86,   87,   88,   89
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**
*Elset, elset=Set-8, INSTANCE=abainstance
 500, 501, 502, 503, 504, 505
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**
*Nset, nset=Set-9, INSTANCE=abainstance
    5,    6,   12,   22,   40,   41
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**
*Elset, elset=Set-9, INSTANCE=abainstance
   2,   4,   5,   6,   7,   8
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**
*Nset, nset=Set-10, INSTANCE=abainstance
 1769, 1771, 1773, 1777, 1782, 1784
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**
*Elset, elset=Set-10, INSTANCE=abainstance, generate
 650,  720,   10
**
*Nset, nset=Set-11, INSTANCE=abainstance
 1767, 1768, 1772, 1779, 1783, 1789
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**
*Elset, elset=Set-11, INSTANCE=abainstance, generate
 561,  631,   10
**
*Nset, nset=Set-12, INSTANCE=abainstance
 1769, 1771, 1773, 1777, 1782, 1784
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**
*Elset, elset=Set-12, INSTANCE=abainstance, generate
 650,  720,   10
**
*Nset, nset=Top, INSTANCE=abainstance
 1769, 1771, 1773, 1777, 1782, 1784
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**
*END ASSEMBLY
**
******************************
**
** BEGIN STEP
**
*STEP,NLGEOM=NO
*STATIC
0.1,1,0.001,0.1
**
*CONTROLS,PARAMETERS=FIELD
0.0001, , , , , , ,
**~ *CONTROLS,PARAMETERS=TIME INCREMENTATION
**~ 50,50,50,100,100,100, ,20, , ,
**
******************************
**
** DEFINE BOUNDARY CONDITIONS
**
*BOUNDARY
**
** U1(LEFT)=0
**
Left,1,1,0.
**
** U2(BOTTOM)=0
**
Bootom,2,2,0.
**
** PSI12(LEFT)=PSI21(LEFT)=0
**
**LEFT,20,21,0.
**
** PSI12(BOTTOM)=PSI21BOTTOM)=0
**
**BOTTOM,20,21,0.
**
Top,2,2,0.1
******************************
**
** APPLY SURFACE LOADS
**
** --> LOAD TYPE IDENTIFIER U1-U8
**
** ELEMENT FACE I II III IV
** LOAD T_X IN X-DIRECTION U1 U2 U3 U4
** LOAD T_Y IN Y-DIRECTION U5 U6 U7 U8
**
** T_X(ELRIGHT)=0.01
**
**DLOAD
**RightElement,U2,100
**
******************************
**
** OUTPUT REQUESTS
**
*Restart, write, frequency=0
**
** FIELD OUTPUT: F-Output-1
**
*Output, field
*Node Output
U,RF
*Element Output, directions=YES
S
**
*ENERGY FILE, FREQUENCY=1
*FILE FORMAT, ZERO INCREMENT
*EL FILE, FREQUENCY=1
SDV
*NODE FILE, FREQUENCY=1
U,RF
**
** END OF STEP
**
*END STEP
**
******************************
**
** END OF FILE
**
